<?xml version="1.0"?>
<!-- Generated by Aero-Matic v 1.1

     Inputs:
                horsepower: 50.0
                     pitch: variable
            max engine rpm: 6800
        prop diameter (ft): 5.1666666666667

     Outputs:
              max prop rpm: 3631.55
                gear ratio:    1.87
                       Cp0: 0.014166
                       Ct0: 0.033007
       static thrust (lbs):  204.90

     Modified:
                gear ratio:   2.58 TCDS BM-14 issue 9
-->

<propeller name="prop">
  <ixx>   1.29 </ixx>
  <diameter unit="IN">  62.0 </diameter>
  <numblades> 2 </numblades>
  <gearratio>  2.58 </gearratio>
  <p_factor>   4.90 </p_factor>
  <minpitch> 22 </minpitch>
  <maxpitch> 45 </maxpitch>
  <constspeed> 0</constspeed>
  <minrpm>   3087 </minrpm>
  <maxrpm>   3632 </maxrpm>

 <!-- thrust coefficient as a function of advance ratio and blade angle -->
  <table name="C_THRUST" type="internal">
      <tableData>
                -10        0         15        25        35        45        55        65       90
      -0.2      -0.0161    0.0091    0.0330    0.0404    0.0446    0.0470    0.0433    0.0371   0.0000
       0.0      -0.0239    0.0000    0.0330    0.0404    0.0446    0.0475    0.0444    0.0371   0.0000
       0.2      -0.0268   -0.0083    0.0285    0.0396    0.0439    0.0475    0.0444    0.0371   0.0000
       0.4      -0.0268   -0.0192    0.0215    0.0392    0.0431    0.0470    0.0444    0.0371   0.0000
       0.6      -0.0268   -0.0268    0.0114    0.0353    0.0413    0.0458    0.0437    0.0371   0.0000
       0.8      -0.0268   -0.0268    0.0006    0.0264    0.0400    0.0442    0.0437    0.0371   0.0000
       1.0      -0.0268   -0.0268   -0.0107    0.0161    0.0384    0.0419    0.0433    0.0371   0.0000
       1.2      -0.0268   -0.0268   -0.0221    0.0050    0.0316    0.0404    0.0433    0.0371   0.0000
       1.4      -0.0268   -0.0268   -0.0268   -0.0072    0.0227    0.0398    0.0425    0.0371   0.0000
       1.6      -0.0268   -0.0268   -0.0268   -0.0184    0.0124    0.0384    0.0417    0.0371   0.0000
       1.8      -0.0268   -0.0268   -0.0268   -0.0268    0.0021    0.0330    0.0404    0.0371   0.0000
       2.0      -0.0268   -0.0268   -0.0268   -0.0268   -0.0083    0.0258    0.0403    0.0371   0.0000
       2.2      -0.0268   -0.0268   -0.0268   -0.0268   -0.0186    0.0186    0.0396    0.0371   0.0000
       2.4      -0.0268   -0.0268   -0.0268   -0.0268   -0.0268    0.0099    0.0323    0.0371   0.0000
       2.6      -0.0268   -0.0268   -0.0268   -0.0268   -0.0268    0.0013    0.0205    0.0330   0.0000
       2.8      -0.0268   -0.0268   -0.0268   -0.0268   -0.0268   -0.0074    0.0134    0.0268   0.0000
       3.0      -0.0268   -0.0268   -0.0268   -0.0268   -0.0268   -0.0161    0.0070    0.0206   0.0000
       3.2      -0.0268   -0.0268   -0.0268   -0.0268   -0.0268   -0.0248    0.0006    0.0145   0.0000
       3.4      -0.0268   -0.0268   -0.0268   -0.0268   -0.0268   -0.0268   -0.0058    0.0083   0.0000
       3.6      -0.0268   -0.0268   -0.0268   -0.0268   -0.0268   -0.0268   -0.0122    0.0021   0.0000
       3.8      -0.0268   -0.0268   -0.0268   -0.0268   -0.0268   -0.0268   -0.0186   -0.0041   0.0000
       4.0      -0.0268   -0.0268   -0.0268   -0.0268   -0.0268   -0.0268   -0.0250   -0.0103   0.0000
       6.0      -0.0268   -0.0268   -0.0268   -0.0268   -0.0268   -0.0268   -0.0268   -0.0268   0.0000
      </tableData>
  </table>

 <!-- power coefficient as a function of advance ratio and blade angle -->
  <table name="C_POWER" type="internal">
     <tableData>
               -10        0        15        25        35        45        55        65       90
      -0.2      0.0024   0.0047    0.0165    0.0375    0.0647    0.0921    0.1062    0.1176   0.1176
       0.0      0.0094   0.0024    0.0142    0.0350    0.0619    0.0921    0.1067    0.1176   0.1176
       0.2      0.0135   0.0038    0.0137    0.0326    0.0592    0.0921    0.1067    0.1176   0.1176
       0.4      0.0181   0.0083    0.0118    0.0300    0.0562    0.0921    0.1067    0.1176   0.1176
       0.6      0.0222   0.0125    0.0078    0.0279    0.0527    0.0902    0.1062    0.1176   0.1176
       0.8      0.0262   0.0168    0.0024    0.0237    0.0496    0.0861    0.1062    0.1176   0.1176
       1.0      0.0302   0.0208    0.0024    0.0166    0.0467    0.0817    0.1058    0.1176   0.1176
       1.2      0.0343   0.0166   -0.0078    0.0064    0.0414    0.0783    0.1051    0.1176   0.1176
       1.4      0.0382   0.0288   -0.0118   -0.0047    0.0319    0.0772    0.1038    0.1176   0.1176
       1.6      0.0422   0.0329   -0.0137   -0.0142    0.0201    0.0751    0.1016    0.1133   0.1176
       1.8      0.0463   0.0368   -0.0142   -0.0237    0.0059    0.0666    0.0985    0.1109   0.1176
       2.0      0.0503   0.0408   -0.0181   -0.0330   -0.0071    0.0567    0.0938    0.1087   0.1176
       2.2      0.0543   0.0449   -0.0222   -0.0425   -0.0212    0.0460    0.0909    0.1038   0.1176
       2.4      0.0584   0.0489   -0.0262   -0.0520   -0.0354    0.0329    0.0883    0.1016   0.1176
       2.6      0.0623   0.0528   -0.0302   -0.0613   -0.0449    0.0137    0.0861    0.0980   0.1176
       2.8      0.0663   0.0569   -0.0343   -0.0708   -0.0538   -0.0047    0.0843    0.0968   0.1176
       3.0      0.0704   0.0609   -0.0382   -0.0803   -0.0637   -0.0212    0.0815    0.0968   0.1176
       3.2      0.0744   0.0649   -0.0422   -0.0897   -0.0732   -0.0378    0.0762    0.0945   0.1176
       3.4      0.0783   0.0690   -0.0463   -0.0992   -0.0826   -0.0543    0.0591    0.0921   0.1176
       3.6      0.0824   0.0730   -0.0503   -0.1087   -0.0921   -0.0708    0.0415    0.0897   0.1176
       3.8      0.0864   0.0769   -0.0543   -0.1176   -0.1016   -0.0874    0.0231    0.0868   0.1176
       4.0      0.0904   0.0810   -0.0584   -0.1176   -0.1176   -0.1038    0.0047    0.0803   0.1176
       6.0      0.1176   0.1176   -0.1176   -0.1176   -0.1176   -0.1176   -0.1176   -0.0708   0.1176
     </tableData>
  </table>

<!-- thrust effects of helical tip Mach -->
<table name="CT_MACH" type="internal">
  <tableData>
    0.85   1.0
    1.05   0.8
  </tableData>
</table>

<!-- power-required effects of helical tip Mach -->
<table name="CP_MACH" type="internal">
  <tableData>
    0.85   1.0
    1.05   1.8
    2.00   1.4
  </tableData>
</table>

</propeller>
