<?xml version="1.0"?>
<?xml-stylesheet type="text/xsl" href="http://jsbsim.sourceforge.net/JSBSim.xsl"?>
<fdm_config name="flash2a" version="2.0" release="ALPHA"
   xmlns:xsi="http://www.w3.org/2001/XMLSchema-instance"
   xsi:noNamespaceSchemaLocation="http://jsbsim.sourceforge.net/JSBSim.xsd">

  <fileheader>
    <author> Stuart Buchanan / D-NXKT </author>
    <email> d_nxkt@yahoo.de </email>
    <filecreationdate> 2014-05-05 </filecreationdate>
    <version> $Version 2.0 $ </version>
    <description> Models a Mainair Flash2 Alpha. </description>
    <note> v2.0: weightshift-control </note>
    <limitation> --- </limitation>
    <documentation> --- </documentation>
    <reference>
      Ref 1: mainairsports Flash 2 Alpha Aircraft Manual
             (http://www.pmaviation.co.uk/admin/upload_pdf/GeminiF2AlphaMan.PDF)
      Ref 2: eXCursion Flightzone July-August 1990
             (http://forums.bmaa.org/attach.aspx/4004/Flash%20IIA2.doc)
      Ref 3: Gratton, G. B., The weightshift-controlled microlight aeroplane, Proc. Instn. Mech. Engrs Vol. 215 Part G
             (bura.brunel.ac.uk/bitstream/2438/1234/1/weightshift.pdf)
      Ref 4: Gratton G. and Newman S., The 'tumle' departure mode in weightshift-controlled microlight aircraft,
             Proc. Instn Mech. Engrs Vol. 217 Part G: Aerospace Engineering, IMechE 2003, pp 149-166
             (www.hgfa.asn.au/resources/tumble1.pdf)
      Ref 5: Civil Aviation Authority - Safety Regulation Group, Microlight Type Approval Data Sheet (TADS)
             No: BM-23 Issue: 13
             (http://www.bmaa.org/files/bm23_13_gemini_flash_iia.pdf)
      Ref 6: Gratton, G. B., A Theoretical and Experimental Appraisal of Airworthiness Evaluation Techniques
             for Small light Aeroplanes, Thesis, Faculty of Engineering and Applied Science Department of
             Aerospace Engineering, University Southhampton, February 2005
             (bura.brunel.ac.uk/bitstream/2438/708/1/FulltextThesis.pdf)
    </reference>
  </fileheader>


<!--
  File:     flash2a.xml
  Inputs:
    name:          flash2a
    type:          light single
    max weight:    815.85 lb
    wing span:     34.61455 ft
    length:        11.35226 ft
    wing area:     187.311 sq-ft
    gear type:     tricycle
    retractable?:  no
    # engines:     1
    engine type:   piston
    engine layout: aft fuselage
    yaw damper?    no

  Outputs:
    wing loading:  4.36 lb/sq-ft
    CL-alpha:      5 per radian
    CL-0:          0.25
    CL-max:        1.4
    CD-0:          0.028
    K:             0.04

-->

 <metrics>
   <wingarea  unit="M2">    15.6 </wingarea>
   <wingspan  unit="FT" >   34.61 </wingspan>
<!--   <wing_incidence unit="DEG"> 10.00 </wing_incidence>   -->
   <chord     unit="FT" >    5.41 </chord>

   <!--
       ___________________________________________________

        datum of all locations is trike nose!
        ( xJSBsim = xModel )
       ___________________________________________________

   -->

   <location name="AERORP" unit="M">
     <x>  1.55 </x>
     <y>  0.00 </y>
     <z>  2.05 </z>
   </location>
   <location name="EYEPOINT" unit="IN">
     <x>  17.71 </x>
     <y> -18.00 </y>
     <z>  45.00 </z>
   </location>
   <location name="VRP" unit="IN">
     <x>0</x>
     <y>0</y>
     <z>0</z>
   </location>
 </metrics>

 <mass_balance>
   <ixx unit="SLUG*FT2">       332 </ixx>
   <iyy unit="SLUG*FT2">        63 </iyy>
   <izz unit="SLUG*FT2">       354 </izz>
   <ixy unit="SLUG*FT2">         0 </ixy>
   <ixz unit="SLUG*FT2">         0 </ixz>
   <iyz unit="SLUG*FT2">         0 </iyz>
   <emptywt unit="KG" >         48. </emptywt>
   <location name="CG" unit="M">
     <x> 1.55</x>
     <y> 0.0 </y>
     <z> 2.05</z>
   </location>

   <pointmass name="Trike">
     <weight unit="KG">100.</weight>
     <location name="NearEngine" unit="M">
       <!-- x,y,z are defined in systems/WeightShift.xml -->
     </location>
   </pointmass>

   <pointmass name="Pilot">
     <weight unit="KG">75.</weight>
     <location name="FrontSeat" unit="M">
       <!-- x,y,z are defined in systems/WeightShift.xml -->
     </location>
   </pointmass>

   <pointmass name="Passenger">
     <weight unit="KG">15.</weight>
     <location name="RearSeat" unit="M">
       <!-- x,y,z are defined in systems/WeightShift.xml -->
     </location>
   </pointmass>
<!--
   <pointmass name="Fuel">
     <weight unit="KG">15.6</weight>
     <location name="Tank" unit="M">
       <x>2.1</x>
       <y>0.</y>
       <z>0.3</z>
     </location>
   </pointmass>
-->
 </mass_balance>

 <ground_reactions>

  <contact type="BOGEY" name="NOSE">
   <location unit="IN">
     <x>  10.71 </x>
     <y>   0.00 </y>
     <z> -15.35 </z>
   </location>
   <static_friction>  0.80 </static_friction>
   <dynamic_friction> 0.50 </dynamic_friction>
   <rolling_friction> 0.02 </rolling_friction>
   <spring_coeff unit="LBS/FT">        944.75 </spring_coeff>
   <damping_coeff unit="LBS/FT/SEC">    81.59 </damping_coeff>
   <max_steer unit="DEG"> 10.00 </max_steer>
   <brake_group>LEFT</brake_group>
   <retractable>0</retractable>
 </contact>

  <contact type="BOGEY" name="LEFT_MAIN">
   <location unit="IN">
     <x> 100.00 </x>
     <y> -33.75 </y>
     <z> -17.25 </z>
   </location>
   <static_friction>  0.80 </static_friction>
   <dynamic_friction> 0.50 </dynamic_friction>
   <rolling_friction> 0.02 </rolling_friction>
   <spring_coeff unit="LBS/FT">        815.85 </spring_coeff>
   <damping_coeff unit="LBS/FT/SEC">   163.17 </damping_coeff>
   <max_steer unit="DEG">0</max_steer>
   <brake_group>NONE</brake_group>
   <retractable>0</retractable>
 </contact>

  <contact type="BOGEY" name="RIGHT_MAIN">
   <location unit="IN">
     <x> 100.00 </x>
     <y>  33.75 </y>
     <z> -17.25 </z>
   </location>
   <static_friction>  0.80 </static_friction>
   <dynamic_friction> 0.50 </dynamic_friction>
   <rolling_friction> 0.02 </rolling_friction>
   <spring_coeff unit="LBS/FT">        815.85 </spring_coeff>
   <damping_coeff unit="LBS/FT/SEC">   163.17 </damping_coeff>
   <max_steer unit="DEG">0</max_steer>
   <brake_group>NONE</brake_group>
   <retractable>0</retractable>
 </contact>

  <contact type="STRUCTURE" name="LEFT_WING">
    <location unit="IN">
     <x> 115.00 </x>
     <y>-223.00 </y>
     <z>  51.25 </z>
    </location>
    <static_friction>  0.80 </static_friction>
    <dynamic_friction> 0.50 </dynamic_friction>
    <spring_coeff unit="LBS/FT">        815.85 </spring_coeff>
    <damping_coeff unit="LBS/FT/SEC">   163.17 </damping_coeff>
 </contact>

  <contact type="STRUCTURE" name="RIGHT_WING">
    <location unit="IN">
     <x> 115.00 </x>
     <y> 223.00 </y>
     <z>  51.25 </z>
    </location>
    <static_friction>  0.80 </static_friction>
    <dynamic_friction> 0.50 </dynamic_friction>
    <spring_coeff unit="LBS/FT">        815.85 </spring_coeff>
    <damping_coeff unit="LBS/FT/SEC">   163.17 </damping_coeff>
 </contact>

 </ground_reactions>

 <external_reactions>

  <force name="hitch" frame="BODY" unit="LBS" >
   <location unit="M">
    <x>2.3</x>
    <y>0.0</y>
    <z>0.5523</z>
   </location>
   <direction>
    <x>0.0</x>
    <y>0.0</y>
    <z>0.0</z>
   </direction>
  </force>

  <force name="parachute" frame="WIND">
   <function>
    <product>
     <p>aero/qbar-psf</p>
     <pow>
      <p>fcs/parachute-pos-norm</p>
      <v>4</v>
     </pow>
     <v>1.6</v>   <!-- Full drag coefficient 1.6 -->
     <v>804.</v>  <!-- Full parachute area 75m^2 (BRS 800 http://www.brs-vertrieb.de/specifications/) -->
    </product>
   </function>
   <location unit="M">
    <x>1.55</x>
    <y>0.0</y>
    <z>1.96</z>
   </location>
   <direction>
    <x>-1.0</x>
    <y>0.0</y>
    <z>0.0</z>
   </direction>
  </force>

 </external_reactions>

 <propulsion>

   <engine file="503">
    <location unit="IN">
      <x>  86.25 </x>
      <y>   0.00 </y>
      <z>  23.75 </z>
    </location>
    <orient unit="DEG">
      <pitch> 0.00 </pitch>
      <roll>   0.00 </roll>
      <yaw>   0.00 </yaw>
    </orient>
    <feed>0</feed>
    <thruster file="prop_ivoprop">
     <location unit="IN">
       <x>  96.25 </x>
       <y>   0.00 </y>
       <z>  25.00 </z>
     </location>
     <orient unit="DEG">
       <pitch> 0.00 </pitch>
       <roll>   0.00 </roll>
       <yaw>   0.00 </yaw>
     </orient>
    </thruster>
  </engine>

  <tank type="FUEL" number="0">
     <location unit="IN">
       <x>  87.00 </x>
       <y>   0.00 </y>
       <z>   9.60 </z>
     </location>
     <capacity unit="LBS"> 34.00 </capacity>
     <contents unit="LBS">  0.00 </contents>
  </tank>

  <tank type="FUEL" number="1">
     <location unit="IN">
       <x>  70.00 </x>
       <y>   0.00 </y>
       <z>   4.00 </z>
     </location>
     <capacity unit="LBS"> 34.00 </capacity>
     <contents unit="LBS">  0.00 </contents>
  </tank>

 </propulsion>

 <flight_control name="FCS: flash2a">

  <channel name="Pitch">

   <!--
   <summer name="Pitch Trim Sum">
      <input>/controls/flight/elevator_custom</input>
      <input>fcs/pitch-trim-cmd-norm</input>
      <clipto>
        <min> -1 </min>
        <max>  1 </max>
      </clipto>
   </summer>
   -->

   <fcs_function name="Pitch Trim">
     <function>
       <sum>
         <property>/controls/flight/elevator_custom</property>
         <product>
           <value> -1 </value>
           <property>/controls/flight/elevator-trim_custom</property>
           <abs>
             <property>/controls/flight/elevator_custom</property>
           </abs>
         </product>
         <property>/controls/flight/elevator-trim_custom</property>
       </sum>
     </function>
     <output>fcs/elevator-pos-norm</output>
   </fcs_function>

   <aerosurface_scale name="Elevator Control">
      <input>-fcs/pitch-trim</input>
      <zero_centered>false</zero_centered>
      <domain>
        <min> -1. </min>
        <max>  1. </max>
      </domain>
      <range>
        <min> -0.157 </min>  <!-- -9.0deg -->
        <max>  0.157 </max>  <!-- +9.0deg -->
      </range>
      <output>fcs/elevator-pos-rad</output>
   </aerosurface_scale>

  </channel>

  <channel name="Roll">

   <summer name="Roll Trim Sum">
      <input>/controls/flight/aileron_custom</input>
      <input>fcs/roll-trim-cmd-norm</input>
      <clipto>
        <min> -1 </min>
        <max>  1 </max>
      </clipto>
   </summer>

   <aerosurface_scale name="Left Aileron Control">
      <input>fcs/roll-trim-sum</input>
      <range>
        <min> -0.35 </min>  <!-- -20.0deg -->
        <max>  0.35 </max>  <!-- +20.0deg -->
      </range>
      <output>fcs/left-aileron-pos-rad</output>
   </aerosurface_scale>

   <pure_gain name="Aileron Custom Control">
     <input>/controls/flight/aileron_custom</input>
     <gain>1.</gain>
     <output>fcs/left-aileron-pos-norm</output>
   </pure_gain>

  </channel>

  <channel name="Yaw">
   <summer name="Rudder Command Sum">
      <input>fcs/rudder-cmd-norm</input>
      <input>fcs/yaw-trim-cmd-norm</input>
      <limit>
        <min> -0.35 </min>
        <max>  0.35 </max>
      </limit>
   </summer>

   <aerosurface_scale name="Rudder Control">
      <input>fcs/rudder-command-sum</input>
      <range>
        <min> -0.35 </min>
        <max>  0.35 </max>
      </range>
      <output>fcs/rudder-pos-rad</output>
   </aerosurface_scale>

   <pure_gain name="Steering Norm">
     <input>fcs/rudder-cmd-norm</input>
     <gain>-1.</gain>
     <output>fcs/rudder-pos-norm</output>
   </pure_gain>

  </channel>

  <channel name="Parachute">

    <kinematic name="fcs/parachute-deployment-control">
      <input>/sim/model/flash2a/parachute</input>
      <traverse>
        <setting>
          <position>0</position>
          <time>0</time>
        </setting>
        <setting>
          <position>1</position>
          <time>2</time>
        </setting>
      </traverse>
    </kinematic>

    <fcs_function name="fcs/parachute-pos-norm">
      <function>
        <description>velocity dependent deployment time</description>
        <pow>
          <property>fcs/parachute-deployment-control</property>
          <quotient>
            <value>40.</value>
            <property>velocities/vtrue-fps</property>
          </quotient>
        </pow>
      </function>
      <clipto>
        <min>0</min>
        <max>1</max>
      </clipto>
    </fcs_function>

  </channel>

 </flight_control>

 <aerodynamics>

  <axis name="LIFT">

    <function name="aero/coefficient/CLalpha">
      <description>Lift_due_to_alpha</description>
      <product>
        <property>aero/qbar-psf</property>
        <property>metrics/Sw-sqft</property>
        <table>
          <independentVar lookup="row">aero/alpha-eff-deg</independentVar>
          <tableData>
            -180.    0.
            -135.    1.
             -90.    0.
             -25.   -1.229
             -20.   -1.025
             -15.   -0.656
             -10.   -0.328
              -5.   -0.082
               0.    0.
               3.    0.242
               5.    0.388
               6.    0.533
               8.5   0.760
               8.8   0.776
               9.5   0.861
              12.    1.108
              15.    1.400
              18.    1.7
              20.    1.800
              22.    1.75
              25.    1.650
              45.    1.
              90.    0.
             135.   -1.
             180.    0.

          <!--
            -180.    0.
            -135.    1.
             -90.    0.
             -25.   -1.229
             -20.   -1.025
             -15.   -0.656
             -10.   -0.328
              -5.   -0.082
               0.   0.205
               0.7  0.242
               2.9  0.388
               5.   0.533
               8.5  0.760
               8.8  0.776
              10.   0.861
              14.   1.108
              15.   1.188
              20.   1.332
              25.   1.188
              90.    0.
             135.   -1.
             180.    0.
          -->
          </tableData>
        </table>
      </product>
    </function>

  </axis>

  <axis name="DRAG">

    <function name="aero/coefficient/CDalpha">
      <description>Drag_due_to_alpha</description>
      <product>
        <property>aero/qbar-psf</property>
        <property>metrics/Sw-sqft</property>
        <table>
          <independentVar
          lookup="row">aero/alpha-eff-deg</independentVar>
          <tableData>
           -180.    0.18
           -135.    1.
            -90.    1.4
            -25.    0.205
            -20.    0.171
            -15.    0.109
            -10.    0.055
             -5.    0.014
              0.    0.052
              3.    0.052
              5.    0.060
              6.    0.065
              8.5   0.080
              8.8   0.081
             10.    0.082
             11.    0.090
             15.    0.11
             18.    0.15
             20.    0.180
             22.    0.19
             25.    0.22
             90.    1.4
            135.    1.
            180.    0.18

          <!--
            -25.          0.205
            -20.          0.171
            -15.          0.109
            -10.          0.055
             -5.          0.014
              0.          0.052
              0.7         0.052
              2.9         0.055
              5.          0.060
              8.5         0.070
              8.8         0.070
             10.          0.075
             14.          0.080
             15.          0.090
             20.          0.120
             25.          0.150
          -->
          </tableData>
        </table>
      </product>
    </function>

    <function name="aero/coefficient/CDbeta">
       <description>Drag_due_to_sideslip</description>
       <product>
          <property>aero/qbar-psf</property>
          <property>metrics/Sw-sqft</property>
          <table>
            <independentVar lookup="row">aero/beta-rad</independentVar>
            <tableData>
              -1.57    1.230
              -0.26    0.050
               0.00    0.000
               0.26    0.050
               1.57    1.230
            </tableData>
          </table>
       </product>
    </function>

  </axis>

  <axis name="SIDE">

    <function name="aero/coefficient/CYb">
       <description>Side_force_due_to_beta</description>
       <product>
           <property>aero/qbar-psf</property>
           <property>metrics/Sw-sqft</property>
           <property>aero/beta-rad</property>
           <value>-1</value>
       </product>
    </function>

  </axis>

  <axis name="ROLL">

    <function name="aero/coefficient/Clb">
       <description>Roll_moment_due_to_beta</description>
       <product>
           <property>aero/qbar-psf</property>
           <property>metrics/Sw-sqft</property>
           <property>metrics/bw-ft</property>
           <property>aero/beta-rad</property>
           <value>-0.1</value>
       <value>0.</value>
       </product>
    </function>

    <function name="aero/coefficient/Clp">
       <description>Roll_moment_due_to_roll_rate</description>
       <product>
           <property>aero/qbar-psf</property>
           <property>metrics/Sw-sqft</property>
           <property>metrics/bw-ft</property>
           <property>aero/bi2vel</property>
           <property>velocities/p-aero-rad_sec</property>
           <value>-0.4</value>
       <value>0.8</value>
       </product>
    </function>

    <function name="aero/coefficient/Clr">
       <description>Roll_moment_due_to_yaw_rate</description>
       <product>
           <property>aero/qbar-psf</property>
           <property>metrics/Sw-sqft</property>
           <property>metrics/bw-ft</property>
           <property>aero/bi2vel</property>
           <property>velocities/r-aero-rad_sec</property>
           <value>0.15</value>
       <value>0.</value>
       </product>
    </function>

    <!--
    <function name="aero/coefficient/Clda">
       <description>Roll_moment_due_to_aileron</description>
       <product>
          <property>aero/qbar-psf</property>
          <property>metrics/Sw-sqft</property>
          <property>metrics/bw-ft</property>
          <property>fcs/left-aileron-pos-rad</property>
          <value>0.</value>
       </product>
    </function>
    -->

  </axis>

  <axis name="PITCH">

    <function name="aero/coefficient/Cm0">
      <description>Pitching_moment_at_zero_alpha</description>
      <product>
        <property>aero/qbar-psf</property>
        <property>metrics/Sw-sqft</property>
        <property>metrics/cbarw-ft</property>
        <value>-0.012</value>
        <value>0.5</value>
      </product>
    </function>

    <function name="aero/coefficient/Cmalpha">
       <description>Pitch_moment_due_to_alpha</description>
       <product>
         <property>aero/qbar-psf</property>
         <property>metrics/Sw-sqft</property>
         <property>metrics/cbarw-ft</property>
         <table>
          <independentVar lookup="row">aero/alpha-eff-deg</independentVar>
          <tableData>
            -180.    0.
            -135.   -0.1
             -90.   -0.2
             -25.    0.087
             -20.    0.112
             -15.    0.137
             -10.    0.124
              -5.    0.099
               0.    0.037
               0.7   0.020
               2.9   0.012
               5.    0.012
               8.5   0.012
               8.8   0.012
               10.   0.012
               15.   0.010
               20.   0.010
               25.  -0.099
               90.  -0.4
              135.  -0.4
              180.   0.
          </tableData>
         </table>
       </product>
    </function>

    <function name="aero/coefficient/CmTrikeDrag">
       <description>Pitch_moment_due_to_trike_drag</description>
       <product>
          <property>aero/qbar-psf</property>   <!-- should be qbar of CG but is qbar of wing: wrong while tumbling -->
          <value>0.8</value>      <!-- trike area 0.8m2 estimated -->
          <value>10.764</value>   <!-- m2 to ft2 -->
          <property>systems/weightshift/distance_z_cg_trike2hp-in</property>
          <value>0.083333</value> <!-- in to ft -->
          <value>0.2</value>      <!-- cw trike estimated-->
          <cos>
            <property>aero/alpha-rad</property> <!-- should be alpha-rad-eff, but good enough -->
          </cos>
       <value>1.</value>
       </product>
    </function>

    <function name="aero/coefficient/Cmq">
       <description>Pitch_moment_due_to_pitch_rate</description>
       <product>
           <property>aero/qbar-psf</property>
           <property>metrics/Sw-sqft</property>
           <property>metrics/cbarw-ft</property>
           <property>aero/ci2vel</property>
           <property>velocities/q-aero-rad_sec</property>
           <value>-12</value>
       <value>0.1</value>
       </product>
    </function>

    <function name="aero/coefficient/Cmadot">
       <description>Pitch_moment_due_to_alpha_rate</description>
       <product>
           <property>aero/qbar-psf</property>
           <property>metrics/Sw-sqft</property>
           <property>metrics/cbarw-ft</property>
           <property>aero/ci2vel</property>
           <property>aero/alphadot-rad_sec</property>
           <value>-7</value>
       <value>0.0</value>
       </product>
    </function>

  </axis>

  <axis name="YAW">

    <function name="aero/coefficient/Cnb">
       <description>Yaw_moment_due_to_beta</description>
       <product>
           <property>aero/qbar-psf</property>
           <property>metrics/Sw-sqft</property>
           <property>metrics/bw-ft</property>
           <property>aero/beta-rad</property>
           <value>0.12</value>
       <value>1.0</value>
       </product>
    </function>

    <function name="aero/coefficient/Cnr">
       <description>Yaw_moment_due_to_yaw_rate</description>
       <product>
           <property>aero/qbar-psf</property>
           <property>metrics/Sw-sqft</property>
           <property>metrics/bw-ft</property>
           <property>aero/bi2vel</property>
           <property>velocities/r-aero-rad_sec</property>
           <value>-0.15</value>
       </product>
    </function>

  </axis>

 </aerodynamics>

  <system file="GroundHandling"/>
  <system file="WeightShift"/>

</fdm_config>
